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/batch
! ANSYS input file written by Workbench version 2024 R1
! File used for geometry attach: C:\Users\jmr180004\Downloads\thin_wall.x_t
/title,project1--Transient Thermal (C5)
/COM,/COM,     ANSYSMotion, 2024.1
/COM,/COM,     MovingHeat, 4.1
/com,--- Data in consistent NMM units. See Solving Units in the help system for more information.
/units,MPA
/prep7
! Turn off shape checking because checks already performed inside WB mesher.
! See help system for more information.
SHPP,OFF,,NOWARN
etcon,set             ! allow ANSYS to choose best KEYOP's for 180x elements, resets any applicable keyopt to MAPDL defaults
/com,*********** Nodes for the whole assembly ***********
nblock,3,,21296
(1i9,3e20.9e3)
     4116    -3.750000000E-01    -2.464152778E+01     3.750000000E+00
     4117    -7.500000000E-01    -2.464152778E+01     3.750000000E+00
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-1
/com,*********** Elements for Body 1 "Part 1" ***********
et,1,279
eblock,19,solid,,720
(19i9)
        1        1        1        1        0        0        0        0       20        0        1        1      787      793      977      528      790      794     1107
     1155     3489     3499     1156     2921     3493     3500     2922     1154     3488     3498     3817
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-1
/com,*********** Elements for Body 2 "Part 2" ***********
et,2,279
eblock,19,solid,,720
(19i9)
        2        2        2        2        0        0        0        0       20        0      721     4116     4896     4907     5219     4643     4903     4906     5265
     5270     7593     7612     5271     7036     7606     7610     7037     5269     7592     7609     8186
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-1
/com,*********** Elements for Body 3 "Part 3" ***********
et,3,279
eblock,19,solid,,720
(19i9)
        3        3        3        3        0        0        0        0       20        0     1441     8231     8989     9167     9375     8758     9164     9168     9380
     9385    11663    11977     9386    11151    11971    11978    11152     9384    11662    11976    12342
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-1
/com,*********** Elements for Body 4 "Part 4" ***********
et,4,279
eblock,19,solid,,720
(19i9)
        4        4        4        4        0        0        0        0       20        0     2161    12346    13419    13469    13472    12873    13420    13468    13481
    13500    16367    16423    13501    15266    16369    16421    15267    13499    16366    16420    16429
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-1
/com,*********** Elements for Body 5 "Part 5" ***********
et,5,279
eblock,19,solid,,532
(19i9)
        5        5        5        5        0        0        0        0       20        0     2881    16461    17161    17159    17148    16892    17232    17160    17151
    17266    19188    19173    17265    18652    19189    19178    18651    17264    19192    19187    19172
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-1
/com,*********** Send User Defined Coordinate System(s) ***********
csys,0
toffst,273.15,  ! Temperature offset from absolute zero
/com,*********** Send Materials ***********
Temperature = 'TEMP' ! Temperature

TB,BISO,1,5,
TBTEMP,20
TBDATA,1,489,1001
TBTEMP,200
TBDATA,1,388,691
TBTEMP,400
TBDATA,1,348,670
TBTEMP,600
TBDATA,1,289,634
TBTEMP,700
TBDATA,1,246,388
MPTEMP,,,,,,,,
MPTEMP,1,20
MPTEMP,2,100
MPTEMP,3,200
MPTEMP,4,300
MPTEMP,5,400
MPTEMP,6,500
MPTEMP,7,600
MPTEMP,8,700
MPTEMP,9,800
MPTEMP,10,900
MPTEMP,11,1000
MPTEMP,12,1100
MPTEMP,13,1200
MPDATA,EX,1, ,195000,191000,186000,180000,173000,164000,
MPDATA,EX,1, ,155000,144000,131000,117000,100000,81000,
MPDATA,EX,1, ,51000,	! tonne s^-2 mm^-1
MPTEMP,,,,,,,,
MPTEMP,,,,,,,,
MPTEMP,1,20
MPTEMP,2,100
MPTEMP,3,200
MPTEMP,4,300
MPTEMP,5,400
MPTEMP,6,500
MPTEMP,7,600
MPTEMP,8,700
MPTEMP,9,800
MPTEMP,10,900
MPTEMP,11,1000
MPTEMP,12,1100
MPTEMP,13,1200
MPDATA,NUXY,1, ,0.25,0.26,0.275,0.315,0.33,0.3,
MPDATA,NUXY,1, ,0.32,0.31,0.24,0.24,0.24,0.24,
MPDATA,NUXY,1, ,0.24,
MPTEMP,,,,,,,,
MPTEMP,,,,,,,,
MPTEMP,1,26.85
MPTEMP,2,126.85
MPTEMP,3,226.85
MPTEMP,4,326.85
MPTEMP,5,426.85
MPTEMP,6,526.85
MPTEMP,7,626.85
MPTEMP,8,726.85
MPTEMP,9,826.85
MPTEMP,10,926.85
MPTEMP,11,1026.85
MPTEMP,12,1126.85
MPTEMP,13,1226.85
MPTEMP,14,1326.85
MPTEMP,15,1426.85
MPTEMP,16,1526.85
MPTEMP,17,1626.85
MPTEMP,18,1726.85
MPTEMP,19,1826.85
MPTEMP,20,1926.85
MPTEMP,21,2026.85
MPTEMP,22,2126.85
MPTEMP,23,2226.85
MPTEMP,24,2326.85
MPTEMP,25,2426.85
MPTEMP,26,2526.85
MPTEMP,27,2626.85
MPTEMP,28,2726.85
MPDATA,DENS,1, ,7.954e-09,7.91e-09,7.864e-09,7.818e-09,7.771e-09,7.723e-09,
MPDATA,DENS,1, ,7.674e-09,7.624e-09,7.574e-09,7.523e-09,7.471e-09,7.419e-09,
MPDATA,DENS,1, ,7.365e-09,7.311e-09,6.979e-09,6.92e-09,6.857e-09,6.791e-09,
MPDATA,DENS,1, ,6.721e-09,6.648e-09,6.571e-09,6.49e-09,6.406e-09,6.318e-09,
MPDATA,DENS,1, ,6.229e-09,6.131e-09,6.032e-09,5.93e-09,	! tonne mm^-3
MPTEMP,,,,,,,,
MPTEMP,,,,,,,,
MPTEMP,1,-0.149999999999977
MPTEMP,2,26.85
MPTEMP,3,76.85
MPTEMP,4,126.85
MPTEMP,5,226.85
MPTEMP,6,326.85
MPTEMP,7,426.85
MPTEMP,8,526.85
MPTEMP,9,626.85
MPTEMP,10,726.85
MPTEMP,11,826.85
MPTEMP,12,926.85
MPTEMP,13,1026.85
MPTEMP,14,1126.85
MPTEMP,15,1226.85
MPTEMP,16,1326.85
MPDATA,ALPX,1, ,1.457e-05,1.478e-05,1.518e-05,1.561e-05,1.633e-05,1.691e-05,
MPDATA,ALPX,1, ,1.742e-05,1.789e-05,1.832e-05,1.871e-05,1.903e-05,1.927e-05,
MPDATA,ALPX,1, ,1.945e-05,1.961e-05,1.977e-05,1.99e-05,	! C^-1
MPTEMP,,,,,,,,
MPAMOD,1,19.85,	! C
MPTEMP,,,,,,,,
MPTEMP,1,-0.149999999999977
MPTEMP,2,19.85
MPTEMP,3,26.85
MPTEMP,4,76.85
MPTEMP,5,126.85
MPTEMP,6,226.85
MPTEMP,7,326.85
MPTEMP,8,426.85
MPTEMP,9,526.85
MPTEMP,10,626.85
MPTEMP,11,726.85
MPTEMP,12,826.85
MPTEMP,13,926.85
MPTEMP,14,1026.85
MPTEMP,15,1126.85
MPTEMP,16,1226.85
MPTEMP,17,1326.85
MPTEMP,18,1370.85
MPTEMP,19,1398.85
MPTEMP,20,1426.85
MPDATA,KXX,1, ,12.97,13.31,13.44,14.32,15.16,16.8,
MPDATA,KXX,1, ,18.36,19.87,21.39,22.79,24.06,25.46,
MPDATA,KXX,1, ,26.74,28.02,29.32,30.61,31.86,32.41,
MPDATA,KXX,1, ,26.9,27.24,	! tonne mm s^-3 C^-1
MPTEMP,,,,,,,,
MPTEMP,,,,,,,,
MPTEMP,1,26.85
MPTEMP,2,126.85
MPTEMP,3,226.85
MPTEMP,4,326.85
MPTEMP,5,426.85
MPTEMP,6,526.85
MPTEMP,7,626.85
MPTEMP,8,726.85
MPTEMP,9,826.85
MPTEMP,10,926.85
MPTEMP,11,1026.85
MPTEMP,12,1126.85
MPTEMP,13,1226.85
MPTEMP,14,1326.85
MPTEMP,15,1426.85
MPTEMP,16,1526.85
MPDATA,C,1, ,498732800,512121600,525510400,538480800,551869600,565258400,
MPDATA,C,1, ,578647200,591617600,605006400,618395200,631784000,644754400,
MPDATA,C,1, ,658143200,671532000,769856000,769856000,	! mm^2 s^-2 C^-1
MPTEMP,,,,,,,,

Temperature = 'TEMP' ! Temperature

TB,BISO,2,5,
TBTEMP,20
TBDATA,1,489,1001
TBTEMP,200
TBDATA,1,388,691
TBTEMP,400
TBDATA,1,348,670
TBTEMP,600
TBDATA,1,289,634
TBTEMP,700
TBDATA,1,246,388
MPTEMP,,,,,,,,
MPTEMP,1,20
MPTEMP,2,100
MPTEMP,3,200
MPTEMP,4,300
MPTEMP,5,400
MPTEMP,6,500
MPTEMP,7,600
MPTEMP,8,700
MPTEMP,9,800
MPTEMP,10,900
MPTEMP,11,1000
MPTEMP,12,1100
MPTEMP,13,1200
MPDATA,EX,2, ,195000,191000,186000,180000,173000,164000,
MPDATA,EX,2, ,155000,144000,131000,117000,100000,81000,
MPDATA,EX,2, ,51000,	! tonne s^-2 mm^-1
MPTEMP,,,,,,,,
MPTEMP,,,,,,,,
MPTEMP,1,20
MPTEMP,2,100
MPTEMP,3,200
MPTEMP,4,300
MPTEMP,5,400
MPTEMP,6,500
MPTEMP,7,600
MPTEMP,8,700
MPTEMP,9,800
MPTEMP,10,900
MPTEMP,11,1000
MPTEMP,12,1100
MPTEMP,13,1200
MPDATA,NUXY,2, ,0.25,0.26,0.275,0.315,0.33,0.3,
MPDATA,NUXY,2, ,0.32,0.31,0.24,0.24,0.24,0.24,
MPDATA,NUXY,2, ,0.24,
MPTEMP,,,,,,,,
MPTEMP,,,,,,,,
MPTEMP,1,26.85
MPTEMP,2,126.85
MPTEMP,3,226.85
MPTEMP,4,326.85
MPTEMP,5,426.85
MPTEMP,6,526.85
MPTEMP,7,626.85
MPTEMP,8,726.85
MPTEMP,9,826.85
MPTEMP,10,926.85
MPTEMP,11,1026.85
MPTEMP,12,1126.85
MPTEMP,13,1226.85
MPTEMP,14,1326.85
MPTEMP,15,1426.85
MPTEMP,16,1526.85
MPTEMP,17,1626.85
MPTEMP,18,1726.85
MPTEMP,19,1826.85
MPTEMP,20,1926.85
MPTEMP,21,2026.85
MPTEMP,22,2126.85
MPTEMP,23,2226.85
MPTEMP,24,2326.85
MPTEMP,25,2426.85
MPTEMP,26,2526.85
MPTEMP,27,2626.85
MPTEMP,28,2726.85
MPDATA,DENS,2, ,7.954e-09,7.91e-09,7.864e-09,7.818e-09,7.771e-09,7.723e-09,
MPDATA,DENS,2, ,7.674e-09,7.624e-09,7.574e-09,7.523e-09,7.471e-09,7.419e-09,
MPDATA,DENS,2, ,7.365e-09,7.311e-09,6.979e-09,6.92e-09,6.857e-09,6.791e-09,
MPDATA,DENS,2, ,6.721e-09,6.648e-09,6.571e-09,6.49e-09,6.406e-09,6.318e-09,
MPDATA,DENS,2, ,6.229e-09,6.131e-09,6.032e-09,5.93e-09,	! tonne mm^-3
MPTEMP,,,,,,,,
MPTEMP,,,,,,,,
MPTEMP,1,-0.149999999999977
MPTEMP,2,26.85
MPTEMP,3,76.85
MPTEMP,4,126.85
MPTEMP,5,226.85
MPTEMP,6,326.85
MPTEMP,7,426.85
MPTEMP,8,526.85
MPTEMP,9,626.85
MPTEMP,10,726.85
MPTEMP,11,826.85
MPTEMP,12,926.85
MPTEMP,13,1026.85
MPTEMP,14,1126.85
MPTEMP,15,1226.85
MPTEMP,16,1326.85
MPDATA,ALPX,2, ,1.457e-05,1.478e-05,1.518e-05,1.561e-05,1.633e-05,1.691e-05,
MPDATA,ALPX,2, ,1.742e-05,1.789e-05,1.832e-05,1.871e-05,1.903e-05,1.927e-05,
MPDATA,ALPX,2, ,1.945e-05,1.961e-05,1.977e-05,1.99e-05,	! C^-1
MPTEMP,,,,,,,,
MPAMOD,2,19.85,	! C
MPTEMP,,,,,,,,
MPTEMP,1,-0.149999999999977
MPTEMP,2,19.85
MPTEMP,3,26.85
MPTEMP,4,76.85
MPTEMP,5,126.85
MPTEMP,6,226.85
MPTEMP,7,326.85
MPTEMP,8,426.85
MPTEMP,9,526.85
MPTEMP,10,626.85
MPTEMP,11,726.85
MPTEMP,12,826.85
MPTEMP,13,926.85
MPTEMP,14,1026.85
MPTEMP,15,1126.85
MPTEMP,16,1226.85
MPTEMP,17,1326.85
MPTEMP,18,1370.85
MPTEMP,19,1398.85
MPTEMP,20,1426.85
MPDATA,KXX,2, ,12.97,13.31,13.44,14.32,15.16,16.8,
MPDATA,KXX,2, ,18.36,19.87,21.39,22.79,24.06,25.46,
MPDATA,KXX,2, ,26.74,28.02,29.32,30.61,31.86,32.41,
MPDATA,KXX,2, ,26.9,27.24,	! tonne mm s^-3 C^-1
MPTEMP,,,,,,,,
MPTEMP,,,,,,,,
MPTEMP,1,26.85
MPTEMP,2,126.85
MPTEMP,3,226.85
MPTEMP,4,326.85
MPTEMP,5,426.85
MPTEMP,6,526.85
MPTEMP,7,626.85
MPTEMP,8,726.85
MPTEMP,9,826.85
MPTEMP,10,926.85
MPTEMP,11,1026.85
MPTEMP,12,1126.85
MPTEMP,13,1226.85
MPTEMP,14,1326.85
MPTEMP,15,1426.85
MPTEMP,16,1526.85
MPDATA,C,2, ,498732800,512121600,525510400,538480800,551869600,565258400,
MPDATA,C,2, ,578647200,591617600,605006400,618395200,631784000,644754400,
MPDATA,C,2, ,658143200,671532000,769856000,769856000,	! mm^2 s^-2 C^-1
MPTEMP,,,,,,,,

Temperature = 'TEMP' ! Temperature

TB,BISO,3,5,
TBTEMP,20
TBDATA,1,489,1001
TBTEMP,200
TBDATA,1,388,691
TBTEMP,400
TBDATA,1,348,670
TBTEMP,600
TBDATA,1,289,634
TBTEMP,700
TBDATA,1,246,388
MPTEMP,,,,,,,,
MPTEMP,1,20
MPTEMP,2,100
MPTEMP,3,200
MPTEMP,4,300
MPTEMP,5,400
MPTEMP,6,500
MPTEMP,7,600
MPTEMP,8,700
MPTEMP,9,800
MPTEMP,10,900
MPTEMP,11,1000
MPTEMP,12,1100
MPTEMP,13,1200
MPDATA,EX,3, ,195000,191000,186000,180000,173000,164000,
MPDATA,EX,3, ,155000,144000,131000,117000,100000,81000,
MPDATA,EX,3, ,51000,	! tonne s^-2 mm^-1
MPTEMP,,,,,,,,
MPTEMP,,,,,,,,
MPTEMP,1,20
MPTEMP,2,100
MPTEMP,3,200
MPTEMP,4,300
MPTEMP,5,400
MPTEMP,6,500
MPTEMP,7,600
MPTEMP,8,700
MPTEMP,9,800
MPTEMP,10,900
MPTEMP,11,1000
MPTEMP,12,1100
MPTEMP,13,1200
MPDATA,NUXY,3, ,0.25,0.26,0.275,0.315,0.33,0.3,
MPDATA,NUXY,3, ,0.32,0.31,0.24,0.24,0.24,0.24,
MPDATA,NUXY,3, ,0.24,
MPTEMP,,,,,,,,
MPTEMP,,,,,,,,
MPTEMP,1,26.85
MPTEMP,2,126.85
MPTEMP,3,226.85
MPTEMP,4,326.85
MPTEMP,5,426.85
MPTEMP,6,526.85
MPTEMP,7,626.85
MPTEMP,8,726.85
MPTEMP,9,826.85
MPTEMP,10,926.85
MPTEMP,11,1026.85
MPTEMP,12,1126.85
MPTEMP,13,1226.85
MPTEMP,14,1326.85
MPTEMP,15,1426.85
MPTEMP,16,1526.85
MPTEMP,17,1626.85
MPTEMP,18,1726.85
MPTEMP,19,1826.85
MPTEMP,20,1926.85
MPTEMP,21,2026.85
MPTEMP,22,2126.85
MPTEMP,23,2226.85
MPTEMP,24,2326.85
MPTEMP,25,2426.85
MPTEMP,26,2526.85
MPTEMP,27,2626.85
MPTEMP,28,2726.85
MPDATA,DENS,3, ,7.954e-09,7.91e-09,7.864e-09,7.818e-09,7.771e-09,7.723e-09,
MPDATA,DENS,3, ,7.674e-09,7.624e-09,7.574e-09,7.523e-09,7.471e-09,7.419e-09,
MPDATA,DENS,3, ,7.365e-09,7.311e-09,6.979e-09,6.92e-09,6.857e-09,6.791e-09,
MPDATA,DENS,3, ,6.721e-09,6.648e-09,6.571e-09,6.49e-09,6.406e-09,6.318e-09,
MPDATA,DENS,3, ,6.229e-09,6.131e-09,6.032e-09,5.93e-09,	! tonne mm^-3
MPTEMP,,,,,,,,
MPTEMP,,,,,,,,
MPTEMP,1,-0.149999999999977
MPTEMP,2,26.85
MPTEMP,3,76.85
MPTEMP,4,126.85
MPTEMP,5,226.85
MPTEMP,6,326.85
MPTEMP,7,426.85
MPTEMP,8,526.85
MPTEMP,9,626.85
MPTEMP,10,726.85
MPTEMP,11,826.85
MPTEMP,12,926.85
MPTEMP,13,1026.85
MPTEMP,14,1126.85
MPTEMP,15,1226.85
MPTEMP,16,1326.85
MPDATA,ALPX,3, ,1.457e-05,1.478e-05,1.518e-05,1.561e-05,1.633e-05,1.691e-05,
MPDATA,ALPX,3, ,1.742e-05,1.789e-05,1.832e-05,1.871e-05,1.903e-05,1.927e-05,
MPDATA,ALPX,3, ,1.945e-05,1.961e-05,1.977e-05,1.99e-05,	! C^-1
MPTEMP,,,,,,,,
MPAMOD,3,19.85,	! C
MPTEMP,,,,,,,,
MPTEMP,1,-0.149999999999977
MPTEMP,2,19.85
MPTEMP,3,26.85
MPTEMP,4,76.85
MPTEMP,5,126.85
MPTEMP,6,226.85
MPTEMP,7,326.85
MPTEMP,8,426.85
MPTEMP,9,526.85
MPTEMP,10,626.85
MPTEMP,11,726.85
MPTEMP,12,826.85
MPTEMP,13,926.85
MPTEMP,14,1026.85
MPTEMP,15,1126.85
MPTEMP,16,1226.85
MPTEMP,17,1326.85
MPTEMP,18,1370.85
MPTEMP,19,1398.85
MPTEMP,20,1426.85
MPDATA,KXX,3, ,12.97,13.31,13.44,14.32,15.16,16.8,
MPDATA,KXX,3, ,18.36,19.87,21.39,22.79,24.06,25.46,
MPDATA,KXX,3, ,26.74,28.02,29.32,30.61,31.86,32.41,
MPDATA,KXX,3, ,26.9,27.24,	! tonne mm s^-3 C^-1
MPTEMP,,,,,,,,
MPTEMP,,,,,,,,
MPTEMP,1,26.85
MPTEMP,2,126.85
MPTEMP,3,226.85
MPTEMP,4,326.85
MPTEMP,5,426.85
MPTEMP,6,526.85
MPTEMP,7,626.85
MPTEMP,8,726.85
MPTEMP,9,826.85
MPTEMP,10,926.85
MPTEMP,11,1026.85
MPTEMP,12,1126.85
MPTEMP,13,1226.85
MPTEMP,14,1326.85
MPTEMP,15,1426.85
MPTEMP,16,1526.85
MPDATA,C,3, ,498732800,512121600,525510400,538480800,551869600,565258400,
MPDATA,C,3, ,578647200,591617600,605006400,618395200,631784000,644754400,
MPDATA,C,3, ,658143200,671532000,769856000,769856000,	! mm^2 s^-2 C^-1
MPTEMP,,,,,,,,

Temperature = 'TEMP' ! Temperature

TB,BISO,4,5,
TBTEMP,20
TBDATA,1,489,1001
TBTEMP,200
TBDATA,1,388,691
TBTEMP,400
TBDATA,1,348,670
TBTEMP,600
TBDATA,1,289,634
TBTEMP,700
TBDATA,1,246,388
MPTEMP,,,,,,,,
MPTEMP,1,20
MPTEMP,2,100
MPTEMP,3,200
MPTEMP,4,300
MPTEMP,5,400
MPTEMP,6,500
MPTEMP,7,600
MPTEMP,8,700
MPTEMP,9,800
MPTEMP,10,900
MPTEMP,11,1000
MPTEMP,12,1100
MPTEMP,13,1200
MPDATA,EX,4, ,195000,191000,186000,180000,173000,164000,
MPDATA,EX,4, ,155000,144000,131000,117000,100000,81000,
MPDATA,EX,4, ,51000,	! tonne s^-2 mm^-1
MPTEMP,,,,,,,,
MPTEMP,,,,,,,,
MPTEMP,1,20
MPTEMP,2,100
MPTEMP,3,200
MPTEMP,4,300
MPTEMP,5,400
MPTEMP,6,500
MPTEMP,7,600
MPTEMP,8,700
MPTEMP,9,800
MPTEMP,10,900
MPTEMP,11,1000
MPTEMP,12,1100
MPTEMP,13,1200
MPDATA,NUXY,4, ,0.25,0.26,0.275,0.315,0.33,0.3,
MPDATA,NUXY,4, ,0.32,0.31,0.24,0.24,0.24,0.24,
MPDATA,NUXY,4, ,0.24,
MPTEMP,,,,,,,,
MPTEMP,,,,,,,,
MPTEMP,1,26.85
MPTEMP,2,126.85
MPTEMP,3,226.85
MPTEMP,4,326.85
MPTEMP,5,426.85
MPTEMP,6,526.85
MPTEMP,7,626.85
MPTEMP,8,726.85
MPTEMP,9,826.85
MPTEMP,10,926.85
MPTEMP,11,1026.85
MPTEMP,12,1126.85
MPTEMP,13,1226.85
MPTEMP,14,1326.85
MPTEMP,15,1426.85
MPTEMP,16,1526.85
MPTEMP,17,1626.85
MPTEMP,18,1726.85
MPTEMP,19,1826.85
MPTEMP,20,1926.85
MPTEMP,21,2026.85
MPTEMP,22,2126.85
MPTEMP,23,2226.85
MPTEMP,24,2326.85
MPTEMP,25,2426.85
MPTEMP,26,2526.85
MPTEMP,27,2626.85
MPTEMP,28,2726.85
MPDATA,DENS,4, ,7.954e-09,7.91e-09,7.864e-09,7.818e-09,7.771e-09,7.723e-09,
MPDATA,DENS,4, ,7.674e-09,7.624e-09,7.574e-09,7.523e-09,7.471e-09,7.419e-09,
MPDATA,DENS,4, ,7.365e-09,7.311e-09,6.979e-09,6.92e-09,6.857e-09,6.791e-09,
MPDATA,DENS,4, ,6.721e-09,6.648e-09,6.571e-09,6.49e-09,6.406e-09,6.318e-09,
MPDATA,DENS,4, ,6.229e-09,6.131e-09,6.032e-09,5.93e-09,	! tonne mm^-3
MPTEMP,,,,,,,,
MPTEMP,,,,,,,,
MPTEMP,1,-0.149999999999977
MPTEMP,2,26.85
MPTEMP,3,76.85
MPTEMP,4,126.85
MPTEMP,5,226.85
MPTEMP,6,326.85
MPTEMP,7,426.85
MPTEMP,8,526.85
MPTEMP,9,626.85
MPTEMP,10,726.85
MPTEMP,11,826.85
MPTEMP,12,926.85
MPTEMP,13,1026.85
MPTEMP,14,1126.85
MPTEMP,15,1226.85
MPTEMP,16,1326.85
MPDATA,ALPX,4, ,1.457e-05,1.478e-05,1.518e-05,1.561e-05,1.633e-05,1.691e-05,
MPDATA,ALPX,4, ,1.742e-05,1.789e-05,1.832e-05,1.871e-05,1.903e-05,1.927e-05,
MPDATA,ALPX,4, ,1.945e-05,1.961e-05,1.977e-05,1.99e-05,	! C^-1
MPTEMP,,,,,,,,
MPAMOD,4,19.85,	! C
MPTEMP,,,,,,,,
MPTEMP,1,-0.149999999999977
MPTEMP,2,19.85
MPTEMP,3,26.85
MPTEMP,4,76.85
MPTEMP,5,126.85
MPTEMP,6,226.85
MPTEMP,7,326.85
MPTEMP,8,426.85
MPTEMP,9,526.85
MPTEMP,10,626.85
MPTEMP,11,726.85
MPTEMP,12,826.85
MPTEMP,13,926.85
MPTEMP,14,1026.85
MPTEMP,15,1126.85
MPTEMP,16,1226.85
MPTEMP,17,1326.85
MPTEMP,18,1370.85
MPTEMP,19,1398.85
MPTEMP,20,1426.85
MPDATA,KXX,4, ,12.97,13.31,13.44,14.32,15.16,16.8,
MPDATA,KXX,4, ,18.36,19.87,21.39,22.79,24.06,25.46,
MPDATA,KXX,4, ,26.74,28.02,29.32,30.61,31.86,32.41,
MPDATA,KXX,4, ,26.9,27.24,	! tonne mm s^-3 C^-1
MPTEMP,,,,,,,,
MPTEMP,,,,,,,,
MPTEMP,1,26.85
MPTEMP,2,126.85
MPTEMP,3,226.85
MPTEMP,4,326.85
MPTEMP,5,426.85
MPTEMP,6,526.85
MPTEMP,7,626.85
MPTEMP,8,726.85
MPTEMP,9,826.85
MPTEMP,10,926.85
MPTEMP,11,1026.85
MPTEMP,12,1126.85
MPTEMP,13,1226.85
MPTEMP,14,1326.85
MPTEMP,15,1426.85
MPTEMP,16,1526.85
MPDATA,C,4, ,498732800,512121600,525510400,538480800,551869600,565258400,
MPDATA,C,4, ,578647200,591617600,605006400,618395200,631784000,644754400,
MPDATA,C,4, ,658143200,671532000,769856000,769856000,	! mm^2 s^-2 C^-1
MPTEMP,,,,,,,,

Temperature = 'TEMP' ! Temperature

TB,BISO,5,5,
TBTEMP,20
TBDATA,1,489,1001
TBTEMP,200
TBDATA,1,388,691
TBTEMP,400
TBDATA,1,348,670
TBTEMP,600
TBDATA,1,289,634
TBTEMP,700
TBDATA,1,246,388
MPTEMP,,,,,,,,
MPTEMP,1,20
MPTEMP,2,100
MPTEMP,3,200
MPTEMP,4,300
MPTEMP,5,400
MPTEMP,6,500
MPTEMP,7,600
MPTEMP,8,700
MPTEMP,9,800
MPTEMP,10,900
MPTEMP,11,1000
MPTEMP,12,1100
MPTEMP,13,1200
MPDATA,EX,5, ,195000,191000,186000,180000,173000,164000,
MPDATA,EX,5, ,155000,144000,131000,117000,100000,81000,
MPDATA,EX,5, ,51000,	! tonne s^-2 mm^-1
MPTEMP,,,,,,,,
MPTEMP,,,,,,,,
MPTEMP,1,20
MPTEMP,2,100
MPTEMP,3,200
MPTEMP,4,300
MPTEMP,5,400
MPTEMP,6,500
MPTEMP,7,600
MPTEMP,8,700
MPTEMP,9,800
MPTEMP,10,900
MPTEMP,11,1000
MPTEMP,12,1100
MPTEMP,13,1200
MPDATA,NUXY,5, ,0.25,0.26,0.275,0.315,0.33,0.3,
MPDATA,NUXY,5, ,0.32,0.31,0.24,0.24,0.24,0.24,
MPDATA,NUXY,5, ,0.24,
MPTEMP,,,,,,,,
MPTEMP,,,,,,,,
MPTEMP,1,26.85
MPTEMP,2,126.85
MPTEMP,3,226.85
MPTEMP,4,326.85
MPTEMP,5,426.85
MPTEMP,6,526.85
MPTEMP,7,626.85
MPTEMP,8,726.85
MPTEMP,9,826.85
MPTEMP,10,926.85
MPTEMP,11,1026.85
MPTEMP,12,1126.85
MPTEMP,13,1226.85
MPTEMP,14,1326.85
MPTEMP,15,1426.85
MPTEMP,16,1526.85
MPTEMP,17,1626.85
MPTEMP,18,1726.85
MPTEMP,19,1826.85
MPTEMP,20,1926.85
MPTEMP,21,2026.85
MPTEMP,22,2126.85
MPTEMP,23,2226.85
MPTEMP,24,2326.85
MPTEMP,25,2426.85
MPTEMP,26,2526.85
MPTEMP,27,2626.85
MPTEMP,28,2726.85
MPDATA,DENS,5, ,7.954e-09,7.91e-09,7.864e-09,7.818e-09,7.771e-09,7.723e-09,
MPDATA,DENS,5, ,7.674e-09,7.624e-09,7.574e-09,7.523e-09,7.471e-09,7.419e-09,
MPDATA,DENS,5, ,7.365e-09,7.311e-09,6.979e-09,6.92e-09,6.857e-09,6.791e-09,
MPDATA,DENS,5, ,6.721e-09,6.648e-09,6.571e-09,6.49e-09,6.406e-09,6.318e-09,
MPDATA,DENS,5, ,6.229e-09,6.131e-09,6.032e-09,5.93e-09,	! tonne mm^-3
MPTEMP,,,,,,,,
MPTEMP,,,,,,,,
MPTEMP,1,-0.149999999999977
MPTEMP,2,26.85
MPTEMP,3,76.85
MPTEMP,4,126.85
MPTEMP,5,226.85
MPTEMP,6,326.85
MPTEMP,7,426.85
MPTEMP,8,526.85
MPTEMP,9,626.85
MPTEMP,10,726.85
MPTEMP,11,826.85
MPTEMP,12,926.85
MPTEMP,13,1026.85
MPTEMP,14,1126.85
MPTEMP,15,1226.85
MPTEMP,16,1326.85
MPDATA,ALPX,5, ,1.457e-05,1.478e-05,1.518e-05,1.561e-05,1.633e-05,1.691e-05,
MPDATA,ALPX,5, ,1.742e-05,1.789e-05,1.832e-05,1.871e-05,1.903e-05,1.927e-05,
MPDATA,ALPX,5, ,1.945e-05,1.961e-05,1.977e-05,1.99e-05,	! C^-1
MPTEMP,,,,,,,,
MPAMOD,5,19.85,	! C
MPTEMP,,,,,,,,
MPTEMP,1,-0.149999999999977
MPTEMP,2,19.85
MPTEMP,3,26.85
MPTEMP,4,76.85
MPTEMP,5,126.85
MPTEMP,6,226.85
MPTEMP,7,326.85
MPTEMP,8,426.85
MPTEMP,9,526.85
MPTEMP,10,626.85
MPTEMP,11,726.85
MPTEMP,12,826.85
MPTEMP,13,926.85
MPTEMP,14,1026.85
MPTEMP,15,1126.85
MPTEMP,16,1226.85
MPTEMP,17,1326.85
MPTEMP,18,1370.85
MPTEMP,19,1398.85
MPTEMP,20,1426.85
MPDATA,KXX,5, ,12.97,13.31,13.44,14.32,15.16,16.8,
MPDATA,KXX,5, ,18.36,19.87,21.39,22.79,24.06,25.46,
MPDATA,KXX,5, ,26.74,28.02,29.32,30.61,31.86,32.41,
MPDATA,KXX,5, ,26.9,27.24,	! tonne mm s^-3 C^-1
MPTEMP,,,,,,,,
MPTEMP,,,,,,,,
MPTEMP,1,26.85
MPTEMP,2,126.85
MPTEMP,3,226.85
MPTEMP,4,326.85
MPTEMP,5,426.85
MPTEMP,6,526.85
MPTEMP,7,626.85
MPTEMP,8,726.85
MPTEMP,9,826.85
MPTEMP,10,926.85
MPTEMP,11,1026.85
MPTEMP,12,1126.85
MPTEMP,13,1226.85
MPTEMP,14,1326.85
MPTEMP,15,1426.85
MPTEMP,16,1526.85
MPDATA,C,5, ,498732800,512121600,525510400,538480800,551869600,565258400,
MPDATA,C,5, ,578647200,591617600,605006400,618395200,631784000,644754400,
MPDATA,C,5, ,658143200,671532000,769856000,769856000,	! mm^2 s^-2 C^-1
MPTEMP,,,,,,,,

!************************* Model Summary ********************
!Part 1,	316 Stainless Steel,	matid,	1
!Part 2,	316 Stainless Steel,	matid,	2
!Part 3,	316 Stainless Steel,	matid,	3
!Part 4,	316 Stainless Steel,	matid,	4
!Part 5,	316 Stainless Steel,	matid,	5
!************************* End Model Summary ********************
/com,*********** Create Contact "Contact Region" ***********
*set,tid,7
*set,cid,6
r,tid
r,cid
et,tid,170
et,cid,174
eblock,10,,,180
(15i9)
     6895        7        7        7        0      661      975      791      753     3236     3495     3420     3235
     6896        7        7        7        0      662      978      975      661     3238     3813     3236     3234
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-1
eblock,10,,,180
(15i9)
     7075        6        6        6        0      661      975      791      753     3236     3495     3420     3235
     7076        6        6        6        0      662      978      975      661     3238     3813     3236     3234
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-1
eblock,10,,,180
(15i9)
     7255        6        7        6        0     5222     5090     4887     4886     7929     7573     7570     7571
     7256        6        7        6        0     5223     5093     5090     5222     7935     7928     7929     8188
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-1
eblock,10,,,180
(15i9)
     7435        7        6        7        0     5222     5090     4887     4886     7929     7573     7570     7571
     7436        7        6        7        0     5223     5093     5090     5222     7935     7928     7929     8188
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-1
keyo,cid,8,2               ! auto create asymmetric contact (from Program Controlled setting)
keyo,cid,10,0              ! adjust contact stiffness each NR iteration (from Program Controlled setting)
keyo,cid,12,5              ! bonded always
keyo,cid,18,1              ! small sliding turned on by application
keyo,cid,2,0               ! augmented Lagrange (from Program Controlled setting)
keyo,cid,4,0               ! on Gauss point (from Program Controlled setting)
keyo,cid,9,1               ! ignore initial gaps/penetration
keyo,cid,7,0               ! No Prediction
rmod,tid,3,10.      ! FKN
rmod,tid,5,0.       ! ICONT
rmod,tid,6,-1.      ! PINB
rmod,tid,10,0.      ! CNOF
rmod,tid,12,0.      ! FKT
rmod,tid,36,38      ! WB DSID
rmod,cid,3,10.      ! FKN
rmod,cid,5,0.       ! ICONT
rmod,cid,6,-1.      ! PINB
rmod,cid,10,0.      ! CNOF
rmod,cid,12,0.      ! FKT
rmod,cid,36,38      ! WB DSID
*set,_maxkxx,324100.
rmod,cid,14,_maxkxx/_ASMDIAG         ! TCC, Divide by Length since Traction Based
rmod,tid,14,_maxkxx/_ASMDIAG      ! TCC, Divide by Length since Traction Based
keyo,cid,1,2     ! Pure thermal contact
/com,*********** Create Contact "Contact Region 2" ***********
*set,tid,9
*set,cid,8
r,tid
r,cid
et,tid,170
et,cid,174
eblock,10,,,180
(15i9)
     7615        9        9        9        0     1107      528      790      794     2922     2921     3493     3500
     7616        9        9        9        0      528      484      789      790     2832     2833     3492     2921
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-1
eblock,10,,,180
(15i9)
     7795        8        8        8        0     1107      528      790      794     2922     2921     3493     3500
     7796        8        8        8        0      528      484      789      790     2832     2833     3492     2921
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-1
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eblock,10,,,180
(15i9)
     8155        9        8        9        0    13481    12873    13420    13468    15267    15266    16369    16421
     8156        9        8        9        0    12873    12870    13421    13420    15259    15260    16368    15266
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-1
keyo,cid,8,2               ! auto create asymmetric contact (from Program Controlled setting)
keyo,cid,10,0              ! adjust contact stiffness each NR iteration (from Program Controlled setting)
keyo,cid,12,5              ! bonded always
keyo,cid,18,1              ! small sliding turned on by application
keyo,cid,2,0               ! augmented Lagrange (from Program Controlled setting)
keyo,cid,4,0               ! on Gauss point (from Program Controlled setting)
keyo,cid,9,1               ! ignore initial gaps/penetration
keyo,cid,7,0               ! No Prediction
rmod,tid,3,10.      ! FKN
rmod,tid,5,0.       ! ICONT
rmod,tid,6,-1.      ! PINB
rmod,tid,10,0.      ! CNOF
rmod,tid,12,0.      ! FKT
rmod,tid,36,41      ! WB DSID
rmod,cid,3,10.      ! FKN
rmod,cid,5,0.       ! ICONT
rmod,cid,6,-1.      ! PINB
rmod,cid,10,0.      ! CNOF
rmod,cid,12,0.      ! FKT
rmod,cid,36,41      ! WB DSID
*set,_maxkxx,324100.
rmod,cid,14,_maxkxx/_ASMDIAG         ! TCC, Divide by Length since Traction Based
rmod,tid,14,_maxkxx/_ASMDIAG      ! TCC, Divide by Length since Traction Based
keyo,cid,1,2     ! Pure thermal contact
/com,*********** Create Contact "Contact Region 3" ***********
*set,tid,11
*set,cid,10
r,tid
r,cid
et,tid,170
et,cid,174
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eblock,10,,,26
(15i9)
     8721       11       10       11        0    16877    16871    16872    16878    18607    18606    18609    18619
     8722       11       10       11        0    16871    16865    16866    16872    18594    18593    18596    18606
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-1
keyo,cid,8,2               ! auto create asymmetric contact (from Program Controlled setting)
keyo,cid,10,0              ! adjust contact stiffness each NR iteration (from Program Controlled setting)
keyo,cid,12,5              ! bonded always
keyo,cid,18,1              ! small sliding turned on by application
keyo,cid,2,0               ! augmented Lagrange (from Program Controlled setting)
keyo,cid,4,0               ! on Gauss point (from Program Controlled setting)
keyo,cid,9,1               ! ignore initial gaps/penetration
keyo,cid,7,0               ! No Prediction
rmod,tid,3,10.      ! FKN
rmod,tid,5,0.       ! ICONT
rmod,tid,6,-1.      ! PINB
rmod,tid,10,0.      ! CNOF
rmod,tid,12,0.      ! FKT
rmod,tid,36,44      ! WB DSID
rmod,cid,3,10.      ! FKN
rmod,cid,5,0.       ! ICONT
rmod,cid,6,-1.      ! PINB
rmod,cid,10,0.      ! CNOF
rmod,cid,12,0.      ! FKT
rmod,cid,36,44      ! WB DSID
*set,_maxkxx,324100.
rmod,cid,14,_maxkxx/_ASMDIAG         ! TCC, Divide by Length since Traction Based
rmod,tid,14,_maxkxx/_ASMDIAG      ! TCC, Divide by Length since Traction Based
keyo,cid,1,2     ! Pure thermal contact
/com,*********** Create Contact "Contact Region 4" ***********
*set,tid,13
*set,cid,12
r,tid
r,cid
et,tid,170
et,cid,174
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eblock,10,,,180
(15i9)
     9287       13       12       13        0     9380     8758     9164     9168    11152    11151    11971    11978
     9288       13       12       13        0     8758     8755     9163     9164    11144    11145    11970    11151
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-1
keyo,cid,8,2               ! auto create asymmetric contact (from Program Controlled setting)
keyo,cid,10,0              ! adjust contact stiffness each NR iteration (from Program Controlled setting)
keyo,cid,12,5              ! bonded always
keyo,cid,18,1              ! small sliding turned on by application
keyo,cid,2,0               ! augmented Lagrange (from Program Controlled setting)
keyo,cid,4,0               ! on Gauss point (from Program Controlled setting)
keyo,cid,9,1               ! ignore initial gaps/penetration
keyo,cid,7,0               ! No Prediction
rmod,tid,3,10.      ! FKN
rmod,tid,5,0.       ! ICONT
rmod,tid,6,-1.      ! PINB
rmod,tid,10,0.      ! CNOF
rmod,tid,12,0.      ! FKT
rmod,tid,36,47      ! WB DSID
rmod,cid,3,10.      ! FKN
rmod,cid,5,0.       ! ICONT
rmod,cid,6,-1.      ! PINB
rmod,cid,10,0.      ! CNOF
rmod,cid,12,0.      ! FKT
rmod,cid,36,47      ! WB DSID
*set,_maxkxx,324100.
rmod,cid,14,_maxkxx/_ASMDIAG         ! TCC, Divide by Length since Traction Based
rmod,tid,14,_maxkxx/_ASMDIAG      ! TCC, Divide by Length since Traction Based
keyo,cid,1,2     ! Pure thermal contact
/com,*********** Create Contact "Contact Region 5" ***********
*set,tid,15
*set,cid,14
r,tid
r,cid
et,tid,170
et,cid,174
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eblock,10,,,180
(15i9)
    10007       15       14       15        0    13102    13104    13287    13103    15773    15777    15774    15772
    10008       15       14       15        0    13101    13107    13104    13102    15771    15776    15773    15770
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-1
keyo,cid,8,2               ! auto create asymmetric contact (from Program Controlled setting)
keyo,cid,10,0              ! adjust contact stiffness each NR iteration (from Program Controlled setting)
keyo,cid,12,5              ! bonded always
keyo,cid,18,1              ! small sliding turned on by application
keyo,cid,2,0               ! augmented Lagrange (from Program Controlled setting)
keyo,cid,4,0               ! on Gauss point (from Program Controlled setting)
keyo,cid,9,1               ! ignore initial gaps/penetration
keyo,cid,7,0               ! No Prediction
rmod,tid,3,10.      ! FKN
rmod,tid,5,0.       ! ICONT
rmod,tid,6,-1.      ! PINB
rmod,tid,10,0.      ! CNOF
rmod,tid,12,0.      ! FKT
rmod,tid,36,50      ! WB DSID
rmod,cid,3,10.      ! FKN
rmod,cid,5,0.       ! ICONT
rmod,cid,6,-1.      ! PINB
rmod,cid,10,0.      ! CNOF
rmod,cid,12,0.      ! FKT
rmod,cid,36,50      ! WB DSID
*set,_maxkxx,324100.
rmod,cid,14,_maxkxx/_ASMDIAG         ! TCC, Divide by Length since Traction Based
rmod,tid,14,_maxkxx/_ASMDIAG      ! TCC, Divide by Length since Traction Based
keyo,cid,1,2     ! Pure thermal contact
/com,*********** Create Contact "Contact Region 6" ***********
*set,tid,17
*set,cid,16
r,tid
r,cid
et,tid,170
et,cid,174
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eblock,10,,,26
(15i9)
    10573       17       16       17        0    16878    16872    16873    16879    18609    18608    18611    18621
    10574       17       16       17        0    16872    16866    16867    16873    18596    18595    18598    18608
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-1
keyo,cid,8,2               ! auto create asymmetric contact (from Program Controlled setting)
keyo,cid,10,0              ! adjust contact stiffness each NR iteration (from Program Controlled setting)
keyo,cid,12,5              ! bonded always
keyo,cid,18,1              ! small sliding turned on by application
keyo,cid,2,0               ! augmented Lagrange (from Program Controlled setting)
keyo,cid,4,0               ! on Gauss point (from Program Controlled setting)
keyo,cid,9,1               ! ignore initial gaps/penetration
keyo,cid,7,0               ! No Prediction
rmod,tid,3,10.      ! FKN
rmod,tid,5,0.       ! ICONT
rmod,tid,6,-1.      ! PINB
rmod,tid,10,0.      ! CNOF
rmod,tid,12,0.      ! FKT
rmod,tid,36,53      ! WB DSID
rmod,cid,3,10.      ! FKN
rmod,cid,5,0.       ! ICONT
rmod,cid,6,-1.      ! PINB
rmod,cid,10,0.      ! CNOF
rmod,cid,12,0.      ! FKT
rmod,cid,36,53      ! WB DSID
*set,_maxkxx,324100.
rmod,cid,14,_maxkxx/_ASMDIAG         ! TCC, Divide by Length since Traction Based
rmod,tid,14,_maxkxx/_ASMDIAG      ! TCC, Divide by Length since Traction Based
keyo,cid,1,2     ! Pure thermal contact
nsel,all
esel,all
fcum,add                   ! add nodal forces up (needed in case have loads on the same edge,vertex)
fcum                       ! reset default on fcum command since done sending WB F loads
/com,*********** Create "Convection" ***********
et,18,152
eblock,10,,,3482
(15i9)
    10599       18       18       18        0      750      779      798      749     3415     3471     3413     3412
    10600       18       18       18        0      751      782      779      750     3417     3470     3415     3414
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-1
esel,s,type,,18
keyop,18,8,5.
keyop,18,13,0
*DIM,_convvari69,TABLE,8,1,1,TEMP, , ,0
! Temperature values
*TAXIS,_convvari69(1),1,1.,10.,100.,200.,300.,500.,700.,1000.
! Load values
_convvari69(1,1,1) = 1.24e-003
_convvari69(2,1,1) = 2.67e-003
_convvari69(3,1,1) = 5.76e-003
_convvari69(4,1,1) = 7.25e-003
_convvari69(5,1,1) = 8.3e-003
_convvari69(6,1,1) = 9.84e-003
_convvari69(7,1,1) = 1.101e-002
_convvari69(8,1,1) = 1.24e-002

esel,all
/com,***************** Define Uniform Initial temperature ***************
tunif,22.
fini
/com,****************************************************************************
/com,*************************    SOLUTION       ********************************
/com,****************************************************************************
/solu
antype,4                   ! transient analysis
kbc,1                      ! stepped BC's
!eqsl,sparse               ! using sparse solver which is default so no eqsl command needed
cntr,print,1               ! print out contact info and also make no initial contact an error
cncheck,dmp		!	Enable program controlled contact splitting for distributed memory parallel run
rescontrol,,none                 ! Do not keep any restart files
dmpoption,emat,no             ! Don't combine emat file for DANSYS
dmpoption,esav,no             ! Don't combine esav file for DANSYS
thopt,quasi,5.e-002
nlhist,nsol,MAX_TEMP,temp,max
nlhist,nsol,MIN_TEMP,temp,min
/com,********* Initial Time Increment Check And Fourier Modulus *********
/com,****************************************************
/com,******************* SOLVE FOR LS 1 OF 1 ****************
esel,s,type,,18
nsle
sf,all,conv,%_convvari69%,22.
nsel,all
esel,all
autots,on
nsub,100,1000,10
time,200.
timint,on                  ! Turn on time integration effects
outres,erase
outres,all,none
outres,nsol,all
outres,rsol,all
outres,eangl,all
outres,veng,all
outres,fflux,all,
outres,cont,all,
esel,s,type,,18
cm,_elmisc,elem
esel,all
outres,misc,all,_elmisc
cnvtol,heat,,1.e-003,,1.e-003 ! Program Controlled. Set MINREF equivalent of 1e-6 Watts
! ****** Begin Command Snippet ******
/com,*********** Moving Heat Flux: Moving Heat Flux ***********

/prep7
CMBLOCK,FACE1,Node,      2374
(8i10)
      7846      7847      7848      7849      7850      7851      7852      7853
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CMBLOCK,PATH1,Node,      91
(8i10)
      7900      7901      7902      7903      7904      7905      7906      7907
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CMBLOCK,START1,Node,      1
(8i10)
      4890
/PREP7
ALLSEL,ALL

INX = 1
LSTP=200					! NUMBER OF LOAD STEPS CONSIDERED
VEL = 1					! VELOCITY OF LASER
SEG = LSTP+1				! NUMBER OF SEGMENTS
R1= 1
LD= 50000.0
TM_L = 200					! END TIME OF THE MOVING HEAT SOURCE
TM_S = 0					! START TIME OF THE MOVING HEAT SOURCE
FP = 'Yes'					! FIRST PATCH POINTER

!! ======STORE EACH WELD DATA AS A PART OF AN ARRAY AND WRITE TO A FILE===========
! ======INDEX
*IF,FP,EQ,'Yes',THEN
*CFOPEN,INDEX1,TXT,,
*VWRITE,INX
%I
*CFCLOSE

! ======VELOCITY
*CFOPEN,VELOCITY1,TXT,,
*VWRITE,VEL
(F10.5)
*CFCLOSE

! ======LSTP
*CFOPEN,LSTP1,TXT,,
*VWRITE,LSTP
%I
*CFCLOSE

! ======R1
*CFOPEN,CON1,TXT,,
*VWRITE,R1
(F10.5)
*CFCLOSE

! ======LD
*CFOPEN,LD1,TXT,,
*VWRITE,LD
(F30.3)
*CFCLOSE

! ======START TIME
*CFOPEN,TMST1,TXT,,
*VWRITE,TM_S
(F10.5)
*CFCLOSE

! ======END TIME
*CFOPEN,TMLT1,TXT,,
*VWRITE,TM_L
(F10.5)
*CFCLOSE

*ELSEIF,FP,EQ,'No',THEN
*CFOPEN,INDEX1,TXT,,APPEND
*VWRITE,INX
%I
*CFCLOSE

! ======VELOCITY
*CFOPEN,VELOCITY1,TXT,,APPEND
*VWRITE,VEL
(F10.5)
*CFCLOSE

! ======LSTP
*CFOPEN,LSTP1,TXT,,APPEND
*VWRITE,LSTP
%I
*CFCLOSE

! ======R1
*CFOPEN,CON1,TXT,,APPEND
*VWRITE,R1
(F10.5)
*CFCLOSE

! ======LD
*CFOPEN,LD1,TXT,,APPEND
*VWRITE,LD
(F30.3)
*CFCLOSE

! ======START TIME
*CFOPEN,TMST1,TXT,,APPEND
*VWRITE,TM_S
(F10.5)
*CFCLOSE

! ======END TIME
*CFOPEN,TMLT1,TXT,,APPEND
*VWRITE,TM_L
(F10.5)
*CFCLOSE
*ELSE
*ENDIF


!===============READ IN ALL MOVING FLUX INFO================
/INQUIRE,NLINE,LINES,INDEX1,TXT		! NUMBER OF MOVING HEAT FLUX DEFINED

*DIM,INDEX,ARRAY,NLINE,1
*DIM,VELOCITY,ARRAY,NLINE,1
*DIM,LSTP,ARRAY,NLINE,1
*DIM,R1,ARRAY,NLINE,1
*DIM,LD,ARRAY,NLINE,1
*DIM,TMST,ARRAY,NLINE,1
*DIM,TMLT,ARRAY,NLINE,1

*VREAD,INDEX(1),'INDEX1','TXT',' ',IJK,NLINE,1,1, ,
(f3.0)
*VREAD,VELOCITY(1),'VELOCITY1','TXT',' ',IJK,NLINE,1,1, ,
(f10.5)
*VREAD,LSTP(1),'LSTP1','TXT',' ',IJK,NLINE,1,1, ,
(f3.0)
*VREAD,R1(1),'CON1','TXT',' ',IJK,NLINE,1,1, ,
(f10.5)
*VREAD,LD(1),'LD1','TXT',' ',IJK,NLINE,1,1, ,
(f30.3)
*VREAD,TMST(1),'TMST1','TXT',' ',IJK,NLINE,1,1, ,
(f10.5)
*VREAD,TMLT(1),'TMLT1','TXT',' ',IJK,NLINE,1,1, ,
(f10.5)

!==============================================================
! CREATE NODAL COMPONENT INCLUDING ALL THE "FACE"
!==============================================================
*DO,INC1,1,NLINE
	*IF,INC1,EQ,1,THEN
		CMSEL,S,'FACE%INDEX(INC1,1)%',NODE
	*ELSE
		CMSEL,A,'FACE%INDEX(INC1,1)%',NODE
	*ENDIF
*ENDDO				!INC1

CM,FACE,NODE
ALLSEL,ALL

!==============================================================
!=======CREATE LOAD RELATED VARIABLE FOR EACH PATH=============
!==============================================================
*DO,INC1,1,NLINE									! LOOP OVER EACH MOVING FLUX LOAD

	CMSEL,S,'PATH%INDEX(INC1,1)%',NODE				! SELECT THE NODES OF PATH%INDEX%

	*GET,'PT_ND%INDEX(INC1,1)%',NODE,,COUNT			! TOTAL NUMBER OF NODES ON THE PATH%INDEX%

	*DIM,'N_PT%INDEX(INC1,1)%',ARRAY,PT_ND%INDEX(INC1,1)%,1					!ARRAY TO NODE NUMBER OF THE LASER PATH%INDEX%
	*DIM,'X_PT%INDEX(INC1,1)%',ARRAY,PT_ND%INDEX(INC1,1)%,1					!ARRAY TO STORE X LOCATION OF THE LASER PATH%INDEX%
	*DIM,'Y_PT%INDEX(INC1,1)%',ARRAY,PT_ND%INDEX(INC1,1)%,1					!ARRAY TO STORE Y LOCATION OF THE LASER PATH%INDEX%
	*DIM,'Z_PT%INDEX(INC1,1)%',ARRAY,PT_ND%INDEX(INC1,1)%,1					!ARRAY TO STORE Z LOCATION OF THE LASER PATH%INDEX%

	*DIM,'PT_LEN%INDEX(INC1,1)%',ARRAY,PT_ND%INDEX(INC1,1)%,1				!ARRAY TO STORE INCREMENTAL LENGTH OF PATH%INDEX% BASED ON NODES

	CMSEL,S,'START%INDEX(INC1,1)%',NODE										! SELECT START POINT ON PATH%INDEX%
	*GET,ND1,NODE,,NUM,MIN													! NODE NUMBER OF THE START POINT ON PATH%INDEX%
	ALLSEL,ALL

	CMSEL,S,'PATH%INDEX(INC1,1)%',NODE										! SELECT THE NODES OF PATH%INDEX%

	PT_LEN%INDEX(INC1,1)%(1,1) = 0

	*DO,INC2,1,PT_ND%INDEX(INC1,1)%

		N_PT%INDEX(INC1,1)%(INC2,1) = ND1
		X_PT%INDEX(INC1,1)%(INC2,1) = NX(ND1)
		Y_PT%INDEX(INC1,1)%(INC2,1) = NY(ND1)
		Z_PT%INDEX(INC1,1)%(INC2,1) = NZ(ND1)
		ND2 = NNEAR(ND1)

		*IF,INC2,NE,PT_ND%INDEX(INC1,1)%,THEN
			PT_LEN%INDEX(INC1,1)%(INC2+1,1) = PT_LEN%INDEX(INC1,1)%(INC2,1)+DISTND(ND1,ND2)
		*ENDIF

		NSEL,U,NODE,,ND1
		ND1 = ND2
	*ENDDO							! INC2

	ALLSEL,ALL
	TOT_LEN%INDEX(INC1,1)% = PT_LEN%INDEX(INC1,1)%(PT_ND%INDEX(INC1,1)%,1)	! TOTAL LENGTH OF THE PATH%INDEX%
	VEL_M%INDEX(INC1,1)% = VELOCITY(INC1,1)

*ENDDO								! INC1

!====================================================================================================
! AT THIS POINT, WE HAVE (X,Y,Z) OF EACH NODE OF EACH PATH, TOTAL LENGTH OF THE PATH, TOTAL NUMBER OF NODES IN EACH PATH
! SAMPLE ARRAY FOR FIRST PATH WILL BE:

! PT_ND1 = SCALAR CONTAINING NUMBER OF NODES IN PATH1
! N_PT1 = ARRAY CONTAINING NODE NUMBER OF PATH1
! X_PT1 = ARRAY CONTAINING X COORDINATES OF NODES ON PATH1
! Y_PT1 = ARRAY CONTAINING Y COORDINATES OF NODES ON PATH1
! Z_PT1 = ARRAY CONTAINING Z COORDINATES OF NODES ON PATH1
! PT_LEN1 = ARRAY TO STORE INCREMENTAL LENGTH OF PATH1 BASED ON NODES
! TOT_LEN1 = TOTAL LENGTH OF THE PATH1
!====================================================================================================
! DETERMINE ON/OFF TIME FOR EACH MOVING FLUX LOAD
!====================================================================================================

*VSCFUN,MAX_T,MAX,TMLT				! MAX END TIME AMONG ALL THE PATHS
*VSCFUN,MIN_T,MIN,TMST				! MIN END TIME AMONG ALL THE PATHS (IDEALLY IT SHOULD BE ZERO)

DT = MAX_T/LSTP(NLINE,1)				! TIME STEP SIZE DURING THE APPLICATION OF MOVING HEAT FLUX

*DIM,T_NR,ARRAY,SEG,1				! ARRAY WITH LINEAR RAMPING OF TIME
*DIM,P1,ARRAY,SEG,1
*VFILL,T_NR,RAMP,0,DT

*DO,INC1,1,NLINE					! LOOP OVER EACH PATH

	TM_S = TMST(INC1,1)
	*VOPER,P1,T_NR,GE,TM_S
	*VSCFUN,TS%INDEX(INC1,1)%,FIRST,P1		! LOAD STEP AT WHICH MOVING FLUX%INDEX% WILL START

	TM_E = TMLT(INC1,1)
	*VOPER,P1,T_NR,GE,TM_E
	*VSCFUN,TE%INDEX(INC1,1)%,FIRST,P1		! LOAD STEP AT WHICH MOVING FLUX%INDEX% WILL END

*stat,TS%INDEX(INC1,1)%
*stat,TE%INDEX(INC1,1)%

*ENDDO		! INC1

!==============================================================
! STORE ALL NODE LOCATIONS IN AN ARRAY
!==============================================================
ALLSEL,ALL
*GET,NDT,NODE,,COUNT

*DIM,VARY_LD,ARRAY,NDT,1		!ARRAY TO STORE FLUX VALUE AT EACH TIME STEP

*DIM,X_LOC,ARRAY,NDT,1			!ARRAY TO STORE X LOCATION OF NODES
*DIM,Y_LOC,ARRAY,NDT,1			!ARRAY TO STORE Y LOCATION OF NODES
*DIM,Z_LOC,ARRAY,NDT,1			!ARRAY TO STORE Z LOCATION OF NODES

*VGET,X_LOC,NODE,,LOC,X
*VGET,Y_LOC,NODE,,LOC,Y
*VGET,Z_LOC,NODE,,LOC,Z

!=============================================================================
! CREATE MASK TO ZEROED OUT FLUX ON NODES WHICH DO NOT BELONG TO 'FACE%INDEX%'
!==============================================================================

*DO,INC1,1,NLINE
	CMSEL,S,'FACE%INDEX(INC1,1)%',NODE				! SELECT SURFACE ON WHICH MOVING FLUX%INDEX% IS APPLIED
	*VGET,NMASK,NODE,,NSEL
	*VOPER,NMASK_1,NMASK,ADD,1
	*VOPER,NMASK%INDEX(INC1,1)%,NMASK_1,DIV,2		! MASK WILL BE USED TO ZEROED OUT FLUX ON NODES WHICH DO NOT BELONG TO 'FACE%INDEX%'
*ENDDO

!==============================================================
!============CREATE SURFACE ELEMENTS FROM THE FLUX LOAD========
!==============================================================
ALLSEL,ALL

*GET,MAX_TYP,ETYP,,NUM,MAX
*GET,MAX_MAT,MAT,,NUM,MAX
*GET,MAX_RL,RCON,,NUM,MAX

ET,MAX_TYP+1,152
KEYOPT,MAX_TYP+1,8,1	! HEAT FLUX OPTION (IGNORE CONVECTION)
TYPE,MAX_TYP+1
MAT,MAX_MAT+1
REAL,MAX_RL+1
CMSEL,S,FACE
ESURF
ALLSEL,ALL

!==============================================================
!============DELETE Killed_ele.txt and read_kill.txt===========
!==============================================================

/INQUIRE,EXT,EXIST,Killed_ele,TXT
*IF,EXT,EQ,1,THEN
	/DELETE,Killed_ele,TXT
*ENDIF

/INQUIRE,EXT,EXIST,read_kill,TXT
*IF,EXT,EQ,1,THEN
	/DELETE,read_kill,TXT
*ENDIF
!==============================================================
!============COMPUTE SURFACE LOAD AND SOLVE====================
!==============================================================
/SOLU

*DO,INC1,1,SEG								! LOOP OVER TIME STEPS

	*DO,INC2,1,NLINE						! LOOP OVER EACH MOVING FLUX LOAD

		*IF,INC1,GE,TS%INDEX(INC2,1)%,AND,INC1,LE,TE%INDEX(INC2,1)%,THEN


			! ===== FIND CENTERS FOR THE MOVING HEAT FLUX FOR EACH LASER======

			DIST_1%INDEX(INC2,1)% = INC1-TS%INDEX(INC2,1)%
			DIST_2%INDEX(INC2,1)% = DIST_1%INDEX(INC2,1)%*DT
			DIST%INDEX(INC2,1)%  = DIST_2%INDEX(INC2,1)%*VEL_M%INDEX(INC2,1)%						! DISTANCE TRAVELLED FROM START POINT OF THE MOVING FLUX%INDEX%

			*VOPER,LOC1%INDEX(INC2,1)%,PT_LEN%INDEX(INC2,1)%,GE,DIST%INDEX(INC2,1)%
			*VSCFUN,LOC2%INDEX(INC2,1)%,FIRST,LOC1%INDEX(INC2,1)%
			LOC3%INDEX(INC2,1)% = LOC2%INDEX(INC2,1)%-1
			A0 = PT_ND%INDEX(INC2,1)%

			*IF,INC1,EQ,TS%INDEX(INC2,1)%,THEN
				A = X_PT%INDEX(INC2,1)%(1,1)
				B = Y_PT%INDEX(INC2,1)%(1,1)
				C = Z_PT%INDEX(INC2,1)%(1,1)

			*ELSEIF,INC1,EQ,TE%INDEX(INC2,1)%,THEN
				A = X_PT%INDEX(INC2,1)%(A0,1)
				B = Y_PT%INDEX(INC2,1)%(A0,1)
				C = Z_PT%INDEX(INC2,1)%(A0,1)
			*ELSE
				RT = (DIST%INDEX(INC2,1)%-PT_LEN%INDEX(INC2,1)%(LOC3%INDEX(INC2,1)%,1))/(PT_LEN%INDEX(INC2,1)%(LOC2%INDEX(INC2,1)%,1)-PT_LEN%INDEX(INC2,1)%(LOC3%INDEX(INC2,1)%,1))
				A = X_PT%INDEX(INC2,1)%(LOC3%INDEX(INC2,1)%,1) + RT*(X_PT%INDEX(INC2,1)%(LOC2%INDEX(INC2,1)%,1)-X_PT%INDEX(INC2,1)%(LOC3%INDEX(INC2,1)%,1))
				B = Y_PT%INDEX(INC2,1)%(LOC3%INDEX(INC2,1)%,1) + RT*(Y_PT%INDEX(INC2,1)%(LOC2%INDEX(INC2,1)%,1)-Y_PT%INDEX(INC2,1)%(LOC3%INDEX(INC2,1)%,1))
				C = Z_PT%INDEX(INC2,1)%(LOC3%INDEX(INC2,1)%,1) + RT*(Z_PT%INDEX(INC2,1)%(LOC2%INDEX(INC2,1)%,1)-Z_PT%INDEX(INC2,1)%(LOC3%INDEX(INC2,1)%,1))

			*ENDIF

			! ====================================================================
			! CALCULATE THE HEAT FLUX CONTRIBUTION DUE TO EACH MOVING FLUX LOAD
			! ====================================================================
			*VOPER,A1,X_LOC,SUB,A								! (X-XO)
			*VOPER,B1,Y_LOC,SUB,B								! (Y-YO)
			*VOPER,C1,Z_LOC,SUB,C								! (Z-Z0)

			*VOPER,A2,A1,MULT,A1									! (X-XO)^2
			*VOPER,B2,B1,MULT,B1									! (Y-YO)^2
			*VOPER,C2,C1,MULT,C1									! (Z-ZO)^2

			*VOPER,A3,A2,ADD,B2									! (X-XO)^2 + (Y-YO)^2
			*VOPER,B3,A3,ADD,C2									! (X-XO)^2 + (Y-YO)^2 + (Z-ZO)^2

			R2 = -1*R1(INC2,1)*R1(INC2,1)
			*VOPER,A4,B3,DIV,R2									! -{(X-XO)^2 + (Y-YO)^2 + (Z-ZO)^2}/R^2
			*VFUN,B4,EXP,A4									! EXP[-{(X-XO)^2 + (Y-YO)^2 + (Z-ZO)^2}/R^2]

			AA1 = LD(INC2,1)
			*VOPER,L_D1,AA1,MULT,B4								! LD*EXP[-{(X-XO)^2 + (Y-YO)^2 + (Z-ZO)^2}/R^2]
			*VOPER,VARY_LD1,L_D1,MULT,NMASK%INDEX(INC2,1)%					! PUT ZERO FLUX TO ANY NODE WHICH DO NOT BELONG TO 'FACE"

			*VOPER,VARY_LD,VARY_LD,ADD,VARY_LD1
		*ENDIF

	*ENDDO													! INC2

			SFFUN,HFLUX,VARY_LD(1)								! APPLYING DISTRIBUTED LOAD ON THE WHOLE SURFACE
			ESEL,S,TYPE,,MAX_TYP+1
			SFE,ALL,1,HFLUX,1,0

	TM = DT*INC1

	TIME,TM
	NSUB,1
	ALLSEL,ALL

	SOLVE
*DIM,VARY_LD,ARRAY,NDT,1

*ENDDO

*DIM,VARY_LD,ARRAY,NDT,1
ESEL,S,TYPE,,MAX_TYP+1
NSLE
SFEDELE,ALL,ALL,HFLUX
ALLSEL,ALL


AUTOTS,ON
NSUB,20,100000000,20
TIMINT,ON
TIME,200.0

! ****** End   Command Snippet ******
! *********** WB SOLVE COMMAND ***********
! check interactive state
*get,ANSINTER_,active,,int
*if,ANSINTER_,ne,0,then
/eof
*endif
solve
/com *************** Write FE CONNECTORS *********
CEWRITE,file,ce,,INTE
/com,****************************************************
/com,*************** FINISHED SOLVE FOR LS 1 *************
/post1
fini
